*HEADING
thin_N: FTM oracle, N on a r=500.0 t=1.0 l=2000.0 tube
*NODE
1, 500.000000, 0.000000, 0.000000
2, 497.592363, 49.008570, 0.000000
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*ELEMENT, TYPE=S4R, ELSET=Shell
1, 1, 2, 66, 65
2, 2, 3, 67, 66
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*SHELL SECTION, ELSET=Shell, MATERIAL=STEEL
1.0
*MATERIAL, NAME=STEEL
*ELASTIC
203000.0, 0.3
*NSET, NSET=Bot, GENERATE
1, 64, 1
*NSET, NSET=Top, GENERATE
2561, 2624, 1
*TRANSFORM, NSET=Bot, TYPE=C
0, 0, 0, 0, 0, 1
*TRANSFORM, NSET=Top, TYPE=C
0, 0, 0, 0, 0, 1
*BOUNDARY
Bot, 1, 2
Bot, 3, 3
Top, 1, 2
*STEP
*BUCKLE
10,
*CLOAD
2561, 3, -1.562500e-02
2562, 3, -1.562500e-02
2563, 3, -1.562500e-02
2564, 3, -1.562500e-02
2565, 3, -1.562500e-02
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2624, 3, -1.562500e-02
*NODE FILE, NSET=Shell
U
*END STEP
